units real
atom_style bond

dimension 3
boundary p p p

pair_style lj/cut 19.99999
pair_modify mix geometric

bond_style hybrid harmonic morse
special_bonds lj 0.0 0.0 0.5 coul 0.0 0.0 0.5

read_data atom_style-bond-data_vacuum.lmp

thermo_style custom ebond eangle edihed eimp epair evdwl ecoul elong etail pe

run 0
